# LAMMPS input file
units real
atom_style full
bond_style harmonic
angle_style harmonic
pair_style lj/cut/tip4p/long 1 2 1 1 0.1546 12.0
kspace_style pppm/tip4p 1.0e-4

# ------------- System definition
lattice fcc 4.04
region box block -4 4 -4 4 -13 13
create_box 5 box &
            bond/types 1 &
            angle/types 1 &
            extra/bond/per/atom 2 &
            extra/angle/per/atom 1 &
            extra/special/per/atom 2


# create the walls
region rbotwall block -4 4 -4 4 -12 -10
region rtopwall block -4 4 -4 4 10 12
region rwall union 2 rbotwall rtopwall
create_atoms 5 region rwall


# create the fluid
region rliquid block -4 4 -4 4 -9 9
molecule h2omol TIP4P2005.txt
lattice sc 4.04
create_atoms 0 region rliquid mol h2omol 482793
create_atoms    3 random 100 676 rliquid
create_atoms    4 random 100 234 rliquid
# settings
# Parameter file
mass 1 15.9994 # water
mass 2 1.008 # water
mass 3 28.990 # ion
mass 4 35.453 # ion
mass 5 26.9815 # wall

pair_coeff 1 1 0.185199 3.1589 # water
pair_coeff 2 2 0.0 0.0 # water
pair_coeff 3 3 0.04690 2.4299 # ion
pair_coeff 4 4 0.1500 4.04470 # ion
pair_coeff 5 5 11.697 2.574 # wall

bond_coeff 1 0 0.9572 # water

angle_coeff 1 0 104.52 # water

fix mynve all nve/limit 0.1
# run
run 10

set type 3 charge 1.0
set type 4 charge -1.0

write_data system.data
write_dump all atom dump.lammpstrj
